Simulations: Version=123
  DataStore
  Replacements
    Report ReportWaterLayers: EventNames=[Clock].DoReport
      VariableNames:
        [Clock].Today
        [Soil].OutputLayers.SWmm
        [Soil].OutputLayers.SW
        [Soil].SoilNitrogen.NH4.kgha[1:8]
        sum([Soil].SoilNitrogen.NH4.kgha[9:30]) as NH4Remainder
        //[Soil].OutputLayers.NH4
        //[Soil].OutputLayers.Urea
    Report ReportWaterBalance: EventNames=[Clock].DoReport
      VariableNames:
        [Clock].Today
        [Soil].WEIRDO.Drainage
        [Soil].WEIRDO.Infiltration
        [Soil].WEIRDO.Runoff
        [Soil].WEIRDO.Es
        [Soil].WEIRDO.WaterExtraction
        [Soil].WEIRDO.pond
        sum([Soil].WEIRDO.SWmm) as ProfileWater
        sum([Soil].WEIRDO.SWmm[1:20]) as ProfileWater1m
        sum([Soil].WEIRDO.PAWCmm) as PAWCmm
        sum([Soil].OutputLayers.PAWmm) as PAW
    Report ReportCrop
      VariableNames:
        [Clock].Today
        [Wheat].Phenology.Zadok.Stage
        [Wheat].Phenology.CurrentStageName
        [Wheat].AboveGround.Wt
        [Wheat].AboveGround.N
        [Wheat].Grain.Total.Wt*10 as Yield
        [Wheat].Grain.Protein
        [Wheat].Grain.Size
        [Wheat].Grain.Number
        [Wheat].Grain.Total.Wt
        [Wheat].Grain.Total.N
        [Wheat].Total.Wt
      EventNames:
        [Wheat].Harvesting
        //[Clock].DoReport
    Report ReportMetVariables: EventNames=[Clock].DoReport
      VariableNames:
        [Clock].Today
        [IWeather].MaxT
        [IWeather].MinT
        [IWeather].Radn
        [IWeather].Rain
        [IWeather].VP
        [IWeather].Wind
        [Soil].WEIRDO.Eo
        [Soil].WEIRDO.Eos
  Experiment Dalyup
    Memo
      ## Issues with WEIRDO
      1. NO solute transport
      2. soilNitrogen not mapped to the 5cm interval that WEIRDO uses

      #Experiment description

      The Dalyup site is a long-term study of effects of claying on water repellence. Tenosols (deep sands) to Sodosols (deep duplex soils).

      3 Reps, 30m x 100 m block

      Five clay rates in 1998: 0, 50, 100, 200, 300 t/ha

      Spading in 2012. Depths: 0, 15, 40 cm

      crop rotation 2004 - 2007: canola (Hyola 501), barley (Gardiner), lupin (Tanjil), canola (Tornado)

      crop rotation 2012-2014: pasture (seradella), wheat(cv Mace) and canola (cv Jackpot)

      ###simulations required
      1. Water repellence
      2. Nutrient accumulation? With different moisture content of the soil in clayed and un-clayed soil, resulting in different OC and N. Currently the SoilNutrient module doesn't handle P and K. These need to be addressed later.
      3. Improved emergence (this may need to be accounted for through manager script)
    Factors
      Factor Repellency
        CompositeFactor High: Specifications=[WEIRDO]
          WEIRDO: PrecipitationInterception=0; Salb=0.15; SubProfileConductance=100; WaterTableDepth=8; CalculateInfiltration=true; CalculateDrainage=true; ReportDetail=false; IncludeSorption=true; CalculateEvaporation=true; CalculateDiffusion=true; DiffusivityMultiplier=1; ExtractionMultiplier=10; ProfileWaterExtraction=0; TotalCover=0; ResidueWater=0; Hour=0; ReportLayer=0; TimeStep=0
            Thickness  LL15   DUL    SAT   CFlow  XFlow  PsiBub  MinRepellancyFactor  LowerRepellentWC  UpperRepellentWC  XF  BD
            100        0.051  0.115  0.46  1.59   3.38   -10     0                    0.5               0.8               1   1.5
            100        0.051  0.114  0.44  1.38   3.4    -10     0                    0.5               0.8               1   1.7
            100        0.052  0.115  0.42  1.33   3.44   -10     0                    0.5               0.8               1   1.5
            100        0.058  0.12   0.42  1.42   3.43   -10     0                    0.5               0.8               1   1.5
            200        0.075  0.12   0.42  1.44   3.43   -10     0                    0.5               0.8               1   1.5
            200        0.085  0.15   0.41  2.32   3.36   -10     0                    0.5               0.8               1   1.5
            200        0.15   0.25   0.41  2.86   3.42   -10     0                    0.5               0.8               1   1.5
            200        0.15   0.25   0.41  2.86   3.42   -10     0                    0.5               0.8               0   1.5
            300        0.15   0.25   0.41  2.86   3.42   -10     0                    0.5               0.8               0   1.5
        CompositeFactor Moderate: Specifications=[WEIRDO]
          WEIRDO: PrecipitationInterception=0; Salb=0.15; SubProfileConductance=100; WaterTableDepth=8; CalculateInfiltration=true; CalculateDrainage=true; ReportDetail=false; IncludeSorption=true; CalculateEvaporation=true; CalculateDiffusion=true; DiffusivityMultiplier=1; ExtractionMultiplier=10; ProfileWaterExtraction=0; TotalCover=0; ResidueWater=0; Hour=0; ReportLayer=0; TimeStep=0
            Thickness  LL15   DUL    SAT   CFlow  XFlow  PsiBub  MinRepellancyFactor  LowerRepellentWC  UpperRepellentWC  XF  BD
            100        0.051  0.115  0.46  1.59   3.38   -10     0.1                  0.5               0.8               1   1.5
            100        0.051  0.114  0.44  1.38   3.4    -10     0.1                  0.5               0.8               1   1.7
            100        0.052  0.115  0.42  1.33   3.44   -10     0.1                  0.5               0.8               1   1.5
            100        0.058  0.12   0.42  1.42   3.43   -10     0.1                  0.5               0.8               1   1.5
            200        0.075  0.12   0.42  1.44   3.43   -10     0.1                  0.5               0.8               1   1.5
            200        0.085  0.15   0.41  2.32   3.36   -10     0.1                  0.5               0.8               1   1.5
            200        0.15   0.25   0.41  2.86   3.42   -10     0.1                  0.5               0.8               1   1.5
            200        0.15   0.25   0.41  2.86   3.42   -10     0.1                  0.5               0.8               0   1.5
            300        0.15   0.25   0.41  2.86   3.42   -10     0.1                  0.5               0.8               0   1.5
        CompositeFactor None: Specifications=[WEIRDO]
          WEIRDO: PrecipitationInterception=0; Salb=0.15; SubProfileConductance=100; WaterTableDepth=8; CalculateInfiltration=true; CalculateDrainage=true; ReportDetail=false; IncludeSorption=true; CalculateEvaporation=true; CalculateDiffusion=true; DiffusivityMultiplier=1; ExtractionMultiplier=10; ProfileWaterExtraction=0; TotalCover=0; ResidueWater=0; Hour=0; ReportLayer=0; TimeStep=0
            Thickness  LL15   DUL    SAT   CFlow  XFlow  PsiBub  MinRepellancyFactor  LowerRepellentWC  UpperRepellentWC  XF  BD
            100        0.051  0.115  0.46  1.59   3.38   -10     1                    0.5               0.8               1   1.5
            100        0.051  0.114  0.44  1.38   3.4    -10     1                    0.5               0.8               1   1.7
            100        0.052  0.115  0.42  1.33   3.44   -10     1                    0.5               0.8               1   1.5
            100        0.058  0.12   0.42  1.42   3.43   -10     1                    0.5               0.8               1   1.5
            200        0.075  0.12   0.42  1.44   3.43   -10     1                    0.5               0.8               1   1.5
            200        0.085  0.15   0.41  2.32   3.36   -10     1                    0.5               0.8               1   1.5
            200        0.15   0.25   0.41  2.86   3.42   -10     1                    0.5               0.8               1   1.5
            200        0.15   0.25   0.41  2.86   3.42   -10     1                    0.5               0.8               0   1.5
            300        0.15   0.25   0.41  2.86   3.42   -10     1                    0.5               0.8               0   1.5
    Simulation DalyupBase
      Clock: Start=2011-01-26; End=2012-01-30
      Summary SummaryFile
      Weather: FileName=Climate\Dalyup.met
      SoilArbitrator
      Zone Field: Area=1; Slope=0; AspectAngle=0; Altitude=50
        Soil Deep sandy duplex 80-100cm (Gibson No455): SoilType=Sandy duplex; LocalName=Deep sandy duplexes; Site=Gibson; NearestTown=Gibson; Region=Southern Region; State=Western Australia; Country=Australia; ApsoilNumber=455; Latitude=-33.706011; Longitude=121.883874; LocationAccuracy=+/- 20m; YearOfSampling=2005
          DataSource=DAFWA David Hall and CSIRO Yvette Oliver. GRDC subsoil constraints project
          Comments=Deep sandy duplex - Sand over clay/impeding layer at 80-100cm; Root to 1 m only, Bl_R4- evidence of waterlogging in photo at pizeometers, adjusted DUL due to waterlogging.
          WEIRDO: PrecipitationInterception=0; Salb=0.15; SubProfileConductance=100; WaterTableDepth=10; CalculateInfiltration=true; CalculateDrainage=true; ReportDetail=false; IncludeSorption=true; CalculateEvaporation=false; CalculateDiffusion=false; DiffusivityMultiplier=1; ExtractionMultiplier=10; ProfileWaterExtraction=0; TotalCover=0; ResidueWater=0; Hour=0; ReportLayer=0; TimeStep=0
          LayerStructure
            Thickness=[50, 50, 50, 50, 50, 50, 50, 50, 50, 50, 50, 50, 50, 50, 50, 50, 50, 50, 50, 50, 50, 50, 50, 50, 50, 50, 50, 50, 50, 50]
          MRSpline
          Evapotranspiration
          Chemical
            Thickness  PH   EC
            100        4.9  0.04
            100        4.2  0.02
            100        4.2  0.02
            100        4.4  0.01
            200        4.4  0.01
            200        4.5  0.01
            200        4.7  0.03
            200        5    0.03
            300        5    0.03
            EC source: Measured (layer 1, 2, 3, 4, 5, 6, 7)
            PH source: Measured, Estimated based on local knowledge
          SoilNitrogen: fom_types=[default, manure, mucuna, lablab, shemp, stable]; fract_carb=[0.2, 0.3, 0.54, 0.57, 0.45, 0]; fract_cell=[0.7, 0.3, 0.37, 0.37, 0.47, 0.1]; fract_lign=[0.1, 0.4, 0.09, 0.06, 0.08, 0.9]; NPartitionApproach=0
            SoilNitrogenNO3 NO3
            SoilNitrogenNH4 NH4
            SoilNitrogenUrea Urea
            SoilNitrogenPlantAvailableNO3 PlantAvailableNO3
            SoilNitrogenPlantAvailableNH4 PlantAvailableNH4
          Organic: FOMCNRatio=40
            Thickness  Carbon  SoilCNRatio  FBiom  FInert  FOM
            100        1.183   14.5         0.04   0.1     250.674
            100        0.559   14.5         0.03   0.3     205.234
            100        0.26    14.5         0.02   0.8     168.032
            100        0.13    14.5         0.01   0.9     137.573
            200        0.13    14.5         0.01   1       92.2177
            200        0.13    14.5         0.01   1       61.8154
            200        0.13    14.5         0.01   1       41.4361
            200        0.13    14.5         0.01   1       27.7754
            300        0.13    14.5         0.01   1       15.2435
          Sample Initial water: Thickness=[100, 100, 100, 100, 200, 200, 200, 200, 300]; SW=[0.115, 0.114, 0.115, 0.12, 0.12, 0.15, 0.25, 0.25, 0.25]; SWUnits=Volumetric; OCUnits=Total; PHUnits=Water
          CERESSoilTemperature Temperature
          OutputLayers: Thickness=[100, 100, 100, 100, 200, 200, 200, 200, 300]
        Plant Wheat
        MicroClimate: a_interception=0; b_interception=1; c_interception=0; d_interception=0; soil_albedo=0.3; SoilHeatFluxFraction=0.4; MinimumHeightDiffForNewLayer=0; NightInterceptionFraction=0.5; ReferenceHeight=2
        Fertiliser
        SurfaceOrganicMatter: InitialResidueName=wheat_stubble; InitialResidueType=wheat; InitialResidueMass=500; InitialStandingFraction=0; InitialCPR=0; InitialCNR=100
        Manager Sow on a fixed date
          Crop = [Wheat]
          SowDate = 15-May
          CultivarName = Mace
          SowingDepth = 30
          RowSpacing = 250
          Population = 150
```csharp
using APSIM.Shared.Utilities;
using Models.Utilities;
using Models.Soils;
using Models.PMF;
using Models.Core;
using System;

namespace Models
{
    [Serializable]
    public class Script : Model
    {
        [Link] Clock Clock;
        [Link] Fertiliser Fertiliser;
        [Link] Summary Summary;
        [Link] Soil Soil;
        
        [Description("Crop")]
        public IPlant Crop { get; set; }

        [Description("Sowing date (d-mmm)")]
        public string SowDate { get; set; }

        [Display(Type = DisplayType.CultivarName)]
        [Description("Cultivar to be sown")]
        public string CultivarName { get; set; }

        [Description("Sowing depth (mm)")]
        public double SowingDepth { get; set; }

        [Description("Row spacing (mm)")]
        public double RowSpacing { get; set; }

        [Description("Plant population (/m2)")]
        public double Population { get; set; }

        [EventSubscribe("DoManagement")]
        private void OnDoManagement(object sender, EventArgs e)
        {
            if (DateUtilities.WithinDates(SowDate, Clock.Today, SowDate))
            {
                Crop.Sow(population: Population, cultivar: CultivarName, depth: SowingDepth, rowSpacing: RowSpacing);    
            }
        }
    }
}
```
        Manager Fertilise on fixed dates
          FertiliserType = UreaN
          FertiliserDates = 01-may
          Amount = 160
          AmountType = False
```csharp
using APSIM.Shared.Utilities;
using Models.PMF;
using Models.Core;
using System;
namespace Models
{
    [Serializable]
    public class Script : Model
    {
        [Link] Clock Clock;
        [Link] Fertiliser Fertiliser;
        
        [Separator("A component to apply fertiliser on one or more dates on every year of the simulation")]

        [Description("Type of fertiliser to apply? ")] 
        public Fertiliser.Types FertiliserType { get; set; }

        [Description("Enter the fertilisation dates as dd-mmm with comma separation (any year information entered will be ignored): ")] 
        public string[] FertiliserDates { get; set; } 

        [Description("Amount of fertiliser to be applied (kg /ha)")] 
        public double Amount { get; set; }

        [Description("Is the above amount to be applied each time? (yes/ticked)? Or is it the total annual amount across all dates (no/unticked)")] 
        public bool AmountType { get; set; }
        
        [EventSubscribe("DoManagement")]
        private void OnDoManagement(object sender, EventArgs e)
        {
            foreach (string ddMMM in FertiliserDates)
            {
                if (DateUtilities.DatesEqual(ddMMM, Clock.Today))
                {
                    if (AmountType)
                        Fertiliser.Apply(Amount: Amount, Type: FertiliserType);
                    else
                        Fertiliser.Apply(Amount: Amount / FertiliserDates.Length, Type: FertiliserType);
                }
            }
        }
    }
}
```
        Manager Harvest
```csharp
using Models.Soils.Nutrients;
using System;
using Models.Core;
using Models.PMF;
using Models.Soils;
using Models.Soils.Nutrients;
using Models.Utilities;
using APSIM.Shared.Utilities;

namespace Models
{
    [Serializable]
    public class Script : Model
    {
        [Link] Plant Wheat;

        [EventSubscribe("DoManagement")]
        private void OnDoManagement(object sender, EventArgs e)
        {
            if (Wheat.IsReadyForHarvesting)
            {
               Wheat.Harvest();
               Wheat.EndCrop();    
            }
        
        }
        
    }
}
```
        Plant Slurp (disabled)
        Manager SlurpSowingRule (disabled)
          CultivarName = Lucerne
          InitialRootDepth = 15
          SowingDate = 03/14/2011 00:00:00
          StopRootDate = 07/14/2012 00:00:00
          MaxG = 0.007
          R50 = 175
```csharp
using Models.PMF.Organs;
using System;
using Models.Core;
using Models.PMF;
using APSIM.Shared.Utilities;
        
namespace Models
{
    [Serializable] 
    [System.Xml.Serialization.XmlInclude(typeof(Model))]
    public class Script : Model
    {
        [Link] private Plant Slurp;
        [Link] private Clock Clock;
        [Link] private Zone zone;
        [Link(Type = LinkType.Path, Path = "[Slurp].Root")]
        private Root root;

        [Description("Cultivar")]
        public string CultivarName { get; set; }
        [Description("Initial Root Depth")]
        public double InitialRootDepth { get; set; }
        [Description("Sowing Date")]
        public DateTime SowingDate { get; set; }
        [Description("Stop Root Date")]
        public DateTime StopRootDate { get; set; }
        [Description("Maximum Stomatal Conductance")]
        public double MaxG { get; set; }
        [Description("Stomatal Radn response")]
        public double R50 { get; set; }
               
        [EventSubscribe("DoManagement")]
        private void OnDoManagement(object sender, EventArgs e)
        {
            if (Clock.Today.Date == SowingDate)
            {
                Slurp.Sow(cultivar: CultivarName, population: 1, depth: InitialRootDepth, rowSpacing: 150);
                object LeafPartFrac = 0.9;
                zone.Set("Slurp.Leaf.DMDemands.Structural.DMDemandFunction.PartitionFraction.FixedValue", LeafPartFrac);
                object RootPartFrac = 0.1;
                zone.Set("Slurp.Root.DMDemands.Structural.DMDemandFunction.PartitionFraction.FixedValue", RootPartFrac);
                object GMaxValue = MaxG;
                zone.Set("Slurp.Leaf.Gsmax350", GMaxValue); 
                object R50Value = R50; 
                zone.Set("Slurp.Leaf.R50", R50Value); 
            }
            //Potato.Sow(... Contains the following arguements:
            //Population  double  Optional  Seeds sowing/m2.  Default is zero
            //Cultivar    string  Required  "NameOfCultivar"
            //Depth       double  Optional  Depth (mm) seed sown.   Default is 100mm 
            //MaxCover    double  Optional  Proportion (0-1) of the ground row crop will cover.   Default is 1.0
            //BudNumber   double  Optional  Number of mainstems per seed sown.  Default is 1.0
            //RowSpacing  double  Optional  Spaceing (mm) between drill rows when crop is sown.  Default is 150mm
            //CropClass   string  Optional  Crop class to instantiate when crop is sown.  Default is "Plant"
            
            if (Clock.Today.Date == StopRootDate)
            {
                object LeafPartFrac = 0.4;
                zone.Set("Slurp.Leaf.DMDemands.Structural.DMDemandFunction.PartitionFraction.FixedValue", LeafPartFrac);
                object RootPartFrac = 0.6;
                zone.Set("Slurp.Root.DMDemands.Structural.DMDemandFunction.PartitionFraction.FixedValue", RootPartFrac);
            }
        }
    }
}
```
        Manager SetCropVariables (disabled)
          CoverFile = %root%\Tests\Validation\Slurp\ShallowSoilTest\CoverInterpolated.csv
          Ext_coef = 0.8
          MaximumHeight = 600
          Cover =
          Irrigation =
          Treatment =
          leaflai = 0
```csharp
using System.Data;
using APSIM.Shared.Utilities;
using System.Xml.Serialization;
using Models;
using Models.PMF;
using System.Text;
using System.Collections.Generic;
using Models.Core;
using System;

namespace Models
{
    [Serializable] 
    //[System.Xml.Serialization.XmlInclude(typeof(Model))]
    public class Script : Model
    {
        [Link] Plant SCRUM;
        [Link] Clock Clock;
        [Link] Zone zone;
        [Link] Simulation Simulation;
        
        [Description("File of Yields")]
        public string CoverFile { get; set; }
        [Description("Extinction coefficient")]
        public  double Ext_coef { get; set; }
        [Description("Maximum height of the crop at full cover")]
        public double MaximumHeight { get; set; }
        
        [XmlIgnore] private DataTable Covers { get; set; }

        public string Cover { get; set; }
        public string Irrigation { get; set; }
        public string Treatment { get; set; }
        
        private double CoverRead { get; set; }
        public double leaflai { get; private set; }
                
        [EventSubscribe("StartOfSimulation")]
        private void OnStartOfSimulation(object sender, EventArgs e)
        {
            
            Treatment = "Lucerne_" + Irrigation;
            
            string fullFileName = PathUtilities.GetAbsolutePath(CoverFile, Simulation.FileName);
            
            ApsimTextFile textFile = new ApsimTextFile();
            textFile.Open(fullFileName);
            Covers = textFile.ToTable();
            textFile.Close();
        }
        
        [EventSubscribe("StartOfDay")]
        private void OnStartOfDay(object sender, EventArgs e)
        {
            foreach (DataRow row in Covers.Rows)
            {
                DateTime TodayDate = Convert.ToDateTime(row["Date"]);
                if (TodayDate.Date == Clock.Today.Date)
                {
                    CoverRead = Convert.ToDouble(row[Treatment]);
                }
            }
        
            if ((bool)zone.Get("Slurp.IsAlive") == true)
            {
                //Only assign cover values if crop is emerged
                
                if (CoverRead == 1)
                    leaflai = Math.Log(0.01) / -Ext_coef;
                else
                {
                    if (CoverRead > 0)
                        leaflai = Math.Log(1 - CoverRead) / -Ext_coef;
                    else
                        leaflai = 0;
                }
                //Summary.WriteMessage(this, "LAI " + leaflai);
                object LAIResetValue = leaflai;
                zone.Set("Slurp.Leaf.Area.FixedValue", LAIResetValue);  
                object HeightResetValue = CoverRead * MaximumHeight;
                zone.Set("Slurp.Leaf.Tallness.FixedValue", HeightResetValue);  
            }
        }
    }
}
```
        Report ReportCrop (disabled)
          EventNames:
            [Wheat].Harvesting
            [Clock].DoReport
        Report ReportWaterLayers: EventNames=[Clock].DoReport
        Report ReportWaterBalance: EventNames=[Clock].DoReport
        Report ReportAllLayers: EventNames=[Clock].DoReport
          VariableNames:
            [Soil].WEIRDO.SW
            [Clock].Today
        Report: EventNames=[Clock].DoReport
          VariableNames:
            [Clock].Today
            [WEIRDO].SW
        Report ReportSLURP (disabled): EventNames=[Clock].DoReport
          VariableNames:
            [Clock].Today
            [Slurp].Leaf.CoverTotal
            [Slurp].Leaf.LAI
            [Slurp].Leaf.Height
            [Slurp].Root.LengthDensity
            [Slurp].Leaf.PotentialEP
            [Slurp].Root.Depth
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